// COMSOL Multiphysics 5.2.0.166 model "NP_reactive_flow_Different_injection_TCE_in_Low_Permeable_update.mph"
// Outline of the model tree

Parameters
  K_att = 3.5e-3  // 1/s, Attachement coefficient
  R_max = 0.05  // kg/kg, maximum retention
  K_det = 0.06  // 1/s, Detachement coefficient
  k_sa = 8.0e-10  // m^3/mol*s, kinetic constant
  u_inject = Q_inject / (3.1416* 0.1/100)  // m/s, injection rate
  c_inject_np = 12.0  // mol/m^3, 2g/L nZVI
  c_tce_ini = 1.5  // mol/m^3, 0.05g/L, TCE initial
  low_PV = 2.3*1.8/10000 * lowPM_porosity  // m^2, PV of low_PV
  high_PV = (3.5*2.5 - 2.3*1.8 - 2* 3.1416 * 0.1 * 0.1)/10000 * highPM_porosity  // m^2, PV of high permeable area
  PV = high_PV + low_PV  // m^2, total PV
  tpv = PV/Q_inject  // s, 1PV time
  highPM_porosity = 0.35  // porosity of highPM
  lowPM_porosity = 0.38  // porosity of lowPM
  rho_b = 2600  // kg/m^3
  lowPM_per = 1e-12  // permeability of low permeable area
  highPM_per = 1e-10  // permeability of low permeable area
  Length_oulet = 3.14159*1/1000  // m, round length
  m_tce_ini = low_PV*c_tce_ini
  outlet_unit_concentration = 3.1416*1/1000*c_tce_ini*u_inject
  Q_inject = Q_inject_design/60/10000/0.25  // m2/s
  Q_inject_design = 0.1  // ml/min for 2.5 mm in depth
  Damkohler_Number = tpv*K_att  // -, ratio of attachement and advection
  q_inject_np = c_inject_np * u_inject * 3.1416 * 1 /1000

Functions
  pw1: Piecewise | arg = x; pieces = {0.7071, 1, d(x^2/(x^2+(1-x)^2),x)}
  int1: Interpolation (disabled) | table = {0.1, }

Variables
  var1 "Variables 1"
    vis_water = 1e-3[Pa]
    np_field_concentration = intop4(d(c_np, t) * highPM_porosity) +intop5(d(c_np, t) * lowPM_porosity)
    np_inflow_concentraion = intop1((nx * dl_w.u + ny * dl_w.v)*c_np)
    np_outflow_concentraion = intop2((nx * dl_w.u + ny * dl_w.v)*c_np)
    np_outflow_mass = intop2((nx * dl_w.u + ny * dl_w.v)*c_np*t)
    np_inflow_mass = intop1((nx * dl_w.u + ny * dl_w.v)*c_np*t)
    np_retention_mass = intop4(c_np * highPM_porosity) + intop5(c_np * lowPM_porosity)  // the retention of NP
    tce_field_concentration = intop4(d(c_tce, t) * highPM_porosity) +intop5(d(c_tce, t) * lowPM_porosity)
    tce_inflow_concentraion = intop1((nx * dl_w.u + ny * dl_w.v)*c_tce)
    tce_outflow_concentraion = intop2((nx * dl_w.u + ny * dl_w.v)*c_tce)
    tce_inflow_mass = intop1((nx * dl_w.u + ny * dl_w.v)*c_tce*t)
    tce_retention_mass = intop4(c_tce * highPM_porosity) + intop5(c_tce * lowPM_porosity)
    tce_retention_mass_highPM = intop4(c_tce * highPM_porosity)
    tce_retention_mass_lowPM = intop5(c_tce * lowPM_porosity)
    np_retention_mass_highPM = intop4(c_np * highPM_porosity)
    np_retention_mass_lowPM = intop5(c_np * lowPM_porosity)
    tce_reacted_mass = m_tce_ini - tce_retention_mass-tce_outflow_Inte  // The reacted TCE
    np_reacted_mass = np_inflow_mass - np_retention_mass -np_outflow_Inte
  var2 "Variables 2" (disabled)

Couplings
  intop1: Integration "Inlet Line" on boundaries 9-12 | intorder = 1; frame = mesh
  intop2: Integration "Outlet Line" on boundaries 13-16 | method = integration; intorder = 1; frame = mesh
  intop3: Integration "Whole area" on domains 1, 2 | intorder = 1; frame = mesh
  intop4: Integration "High PM" on domains 1 | intorder = 1; frame = mesh
  intop5: Integration "Low PM" on domains 2 | intorder = 1; frame = mesh

Probes
  pdom1: DomainPoint "Domain Point Probe 1" (disabled)
    ppb1: PointExpr "Point Probe Expression 1" | expr = c; unit = mol/m^3

Geometry
  geom2 "Geometry 2" (2D, length unit cm)
    r1: Rectangle | pos = {0, 0}; type = solid; base = corner; size = {3.5, 2.5}
    c1: Circle | pos = {0.2, 0.2}; type = solid; base = center; r = 0.1
    c2: Circle | pos = {3.3, 2.3}; type = solid; base = center; r = 0.1
    dif1: Difference | input = r1; input2 = c1, c2
    r2: Rectangle | pos = {0.6, 0.35}; type = solid; base = corner; size = {2.3, 1.8}
    dif2: Difference | input = dif1; input2 = r2
    r3: Rectangle | pos = {0.6, 0.35}; type = solid; base = corner; size = {2.3, 1.8}
    fin: Finalize "Form Union"

Materials
  mat2: Common "Water" on no domains
    def "Basic"
      dynamicviscosity = eta(T[1/K])[Pa*s]
      ratioofspecificheat = 1.0
      electricconductivity = 5.5e-6[S/m]
      heatcapacity = Cp(T[1/K])[J/(kg*K)]
      density = rho(T[1/K])[kg/m^3]
      thermalconductivity = k(T[1/K])[W/(m*K)]
      soundspeed = cs(T[1/K])[m/s]
      eta: Piecewise
        arg = T
        extrap = constant
        pieces = 
          {273.15, 413.15, 1.3799566804-0.021224019151*T^1+1.3604562827E-4*T^2-4.6454090319E-7*T^3+8.9042735735E-10*T^4-9.0790692686E-13*T^5+3.8457331488E-16*T^6}
          {413.15, 553.75, 0.00401235783-2.10746715E-5*T^1+3.85772275E-8*T^2-2.39730284E-11*T^3}
      Cp: Piecewise | arg = T; extrap = constant; pieces = {273.15, 553.75, 12010.1471-80.4072879*T^1+0.309866854*T^2-5.38186884E-4*T^3+3.62536437E-7*T^4}
      rho: Piecewise | arg = T; extrap = constant; pieces = {273.15, 553.75, 838.466135+1.40050603*T^1-0.0030112376*T^2+3.71822313E-7*T^3}
      k: Piecewise | arg = T; extrap = constant; pieces = {273.15, 553.75, -0.869083936+0.00894880345*T^1-1.58366345E-5*T^2+7.97543259E-9*T^3}
      cs: Interpolation | source = table; table = {{273, 1403}, {278, 1427}, {283, 1447}, {293, 1481}, {303, 1507}, {313, 1526}, {323, 1541}, {333, 1552}, {343, 1555}, {353, 1555}, {363, 1550}, {373, 1543}}; interp = piecewisecubic; extrap = const
  mat3: Common "Air" on no domains
    def "Basic"
      relpermeability = 1
      relpermittivity = 1
      dynamicviscosity = eta(T[1/K])[Pa*s]
      ratioofspecificheat = 1.4
      electricconductivity = 0[S/m]
      heatcapacity = Cp(T[1/K])[J/(kg*K)]
      density = rho(pA[1/Pa],T[1/K])[kg/m^3]
      thermalconductivity = k(T[1/K])[W/(m*K)]
      soundspeed = cs(T[1/K])[m/s]
      eta: Piecewise | arg = T; extrap = constant; pieces = {200.0, 1600.0, -8.38278E-7+8.35717342E-8*T^1-7.69429583E-11*T^2+4.6437266E-14*T^3-1.06585607E-17*T^4}
      Cp: Piecewise | arg = T; extrap = constant; pieces = {200.0, 1600.0, 1047.63657-0.372589265*T^1+9.45304214E-4*T^2-6.02409443E-7*T^3+1.2858961E-10*T^4}
      rho: Analytic | expr = pA*0.02897/8.314/T; args = {pA, T}; dermethod = manual; argders = {{pA, d(pA*0.02897/8.314/T,pA)}, {T, d(pA*0.02897/8.314/T,T)}}
      k: Piecewise | arg = T; extrap = constant; pieces = {200.0, 1600.0, -0.00227583562+1.15480022E-4*T^1-7.90252856E-8*T^2+4.11702505E-11*T^3-7.43864331E-15*T^4}
      cs: Analytic | expr = sqrt(1.4*287*T); args = T; dermethod = manual; argders = {T, d(sqrt(1.4*287*T),T)}
    RefractiveIndex
      n = 1
      ki = 0
  mat4: Common "High_PM" on domains 1
    def "Basic"
      porosity = highPM_porosity
      density = 2600
      hydraulicpermeability = highPM_per
  mat5: Common "Low_PM" on domains 2
    def "Basic"
      porosity = lowPM_porosity
      density = 2600
      hydraulicpermeability = lowPM_per
  mat6: Common "High_PM" (disabled)
    def "Basic"
      porosity = 0.4
      density = 2600
      hydraulicpermeability = 9.87e-10
  mat7: Common "Low_PM" (disabled)
    def "Basic"
      porosity = 0.3
      density = 2600
      hydraulicpermeability = 6.88e-12

Physics
  ge: GlobalEquations "TCE Integration of outflow"
    ge1: GlobalEquations
      name = tce_outflow_Inte
      equation = d(tce_outflow_Inte,t)-tce_outflow_concentraion
      valueType = complex
      DependentVariableQuantity = none
      CustomDependentVariableUnit = mol/m
      SourceTermQuantity = none
      CustomSourceTermUnit = mol/m
  ge2: GlobalEquations "NP Integration of outflow"
    ge1: GlobalEquations
      name = np_outflow_Inte
      equation = d(np_outflow_Inte,t)-np_outflow_concentraion
      valueType = complex
      DependentVariableQuantity = none
      CustomDependentVariableUnit = mol/m
      SourceTermQuantity = none
      CustomSourceTermUnit = mol/m
  tracer: DilutedSpeciesPorousMedia on domains 1, 2
    dependent variable c_tce = {c_tce, c_np}
    TransportMechanism.AdsorptionInPorousMedia = 1
    TransportMechanism.DispersionInPorousMedia = 1
    TransportMechanism.Convection = 1
    pmtp1: PorousMediaTransportProperties (default)
      PorousMaterial = mat4
      epsilon_p_mat = from_mat
      FluidMaterialList = mat2
      FluidDiffusivityModelType = BruggemanModel
      SorptionType = {Langmuir, UserDefined}
      alphaLc = {0.0035, 0}
      DDc = {{2*10e-9, 0, 0, 0, 2*10e-9, 0, 0, 0, 2*10e-9}, {0, 0, 0, 0, 0, 0, 0, 0, 0}}
      SpecifyDispersionIndividually = 1
      DispersionTensor = UserDefined
      DispersivityModel = Isotropic
      alphaL = 0.01
      alphaT = 0.01
      minput_velocity = {dl_w.u, dl_w.v, 0}
      DF_c = 6e-10[m^2/s]
      DF_c_tracer = 6.7e-11[m^2/s]
    nflx1: NoFlux (default)
    init1: init "Initial Values 1" (default) | initc = {0, 0}
    pmtp2: PorousMediaTransportProperties on domains 2
      PorousMaterial = mat5
      epsilon_p_mat = from_mat
      FluidMaterialList = mat2
      SorptionType = {Langmuir, Langmuir}
      DDc = {{1*10e-9, 0, 0, 0, 1*10e-9, 0, 0, 0, 1*10e-9}, {0, 0, 0, 0, 0, 0, 0, 0, 0}}
      SpecifyDispersionIndividually = 1
      DispersionTensor = UserDefined
      alphaL = 0.004
      alphaT = 0.004
      DD = 2*10e-10
      minput_velocity = {dl_w.u, dl_w.v, 0}
      DF_c = 1e-11[m^2/s]
      DF_c_tracer = 6.7e-12[m^2/s]
    in1: Inflow on boundaries 9-12 | c0 = {0, c_inject_np}; BoundaryConditionType = FluxDanckwerts
    out1: Outflow on boundaries 13-16
    reac1: Reactions "ReactionWithTCE" on domains 1, 2 | R_c_tce = k_sa * c_tce * c_np
    ss1: SpeciesSource on no domains | S = {0, R_R}
    init2: init "Initial Values 2" on domains 2 | initc = {c_tce_ini, 0}
  dode: DomainODE "Domain ODEs and DAEs" on all domains
    dependent variable R_R
    Units.SourceTermQuantity = none
    Units.CustomSourceTermUnit = g/kg
    dode1: DistributedODE "sorption change" (default)
      f = K_att * (1 - R_R / R_max) * c_np - rho_b / 0.4 * K_det * R_R
      da = 1
    init1: init "Initial Values 1" (default)
  tpdl: TwoPhaseDarcysLaw (disabled) on all domains
    dependent variable p
    dependent variable c_w
    fmp1: FluidsMatrixProperties "Fluid and Matrix Properties 1" (default)
      matlistfl1 = mat2
      rho1_mat = from_mat
      mu1_mat = userdef
      mu1 = vis_water
      matlistfl2 = mat3
      epsilon_mat = userdef
      epsilon = 0.3
      kappa_mat = userdef
      kappa = 1E-5
      capillarymodel = Capillarypressure
    nflx1: NoFlux (default)
    init1: Init "Initial Values 1" (default) | s10 = 1
    in1: Inflow "Inlet 1" on boundaries 9-12 | U0 = 0.01; s10 = 0.2
    out1: Outflow "Outlet 1" on boundaries 13-16
  rfcs: ReactingFlowPorousCS "Reacting Flow in Porous Media" (disabled) on all domains
    dependent variable w1 = {w1, w2}
    EquationForm.form = Transient
    SpeciesProperties.FromMassConstraint = 2
    tp1: TransportProperties (default) | FluidMaterial = mat2
    nflx1: NoFlux (default)
    wall1: WallFreePorous "Wall 1" (default)
    init1: init "Initial Values 1" (default) | MixtureSpecification = MolarConcentrations
    reac1: Reactions on no domains
    pmp1: PorousMatrixProperties on domains 1 | PorousMaterial = mat4
  tpdl2: TwoPhaseDarcysLaw (disabled) on all domains
    dependent variable p2
    fmp1: FluidsMatrixProperties "Fluid and Matrix Properties 1" (default)
    nflx1: NoFlux (default)
    init1: Init "Initial Values 1" (default)
  dl_w: DarcysLaw on all domains
    dependent variable p_w
    dlm1: DarcysLawModel "Fluid and Matrix Properties 1" (default)
      FluidMaterial = mat2
      ktype = permeability
      PorousMaterial = mat4
      epsilon_mat = from_mat
      kappa_mat = from_mat
    nf1: NoFlow (default)
    init1: init "Initial Values 1" (default)
    dlm2: DarcysLawModel "Fluid and Matrix Properties 2" on domains 2
      FluidMaterial = mat2
      ktype = permeability
      K = 2.94e-6[m/s]
      PorousMaterial = mat5
      epsilon_mat = userdef
      epsilon = 0.3
    inl1: Inlet on boundaries 9-12 | U0 = u_inject
    out1: Outlet (disabled) on no boundaries
    ag1: Atmosphere "Atmosphere/Gauge 1" on boundaries 13-16
    smm1: StorageModel (disabled) on no domains
  np: DilutedSpeciesPorousMedia "Nanoparticle in Porous Media" (disabled) on all domains
    dependent variable c
    TransportMechanism.AdsorptionInPorousMedia = 1
    TransportMechanism.DispersionInPorousMedia = 1
    pmtp1: PorousMediaTransportProperties (default)
      PorousMaterial = mat4
      FluidMaterialList = mat2
      DF_c = 4.36e-12[m^2/s]
      SorptionType = Langmuir
      DispersionTensor = Dispersivity
      DispersivityModel = Isotropic
      minput_velocity_src = root.comp2.dl_w.u
    nflx1: NoFlux (default)
    init1: init "Initial Values 1" (default) | initc = 26
  re_TCE: ReactionEng "Reaction Engineering - TCE" (disabled)
    mixture.mixture = liquid
    inits1: SpeciesInitialValue "Initial Values 1"
  dode2: DomainODE "Domain ODEs and DAEs 2" (disabled) on all domains
    dependent variable u3
    dode1: DistributedODE (default) | f = 1; da = 1
    init1: init "Initial Values 1" (default)
  bode: BoundaryODE "Boundary ODEs and DAEs" (disabled) on all boundaries
    dependent variable u4
    dode1: DistributedODE (default) | f = 1; da = 1
    init1: init "Initial Values 1" (default)

Mesh
  mesh2 "Mesh 2" (physics-controlled)
    size: MeshSizeDefault | hauto = 3

Studies
  std1 "Study 1"
    time: Transient "Time Dependent"
      tunit = s
      tlist = range(0,1,2000)
      useparam = on
      pname = lowPM_per
      plistarr = 1e-14, 1e-12, 1e-11, 1e-10

Solver configurations
  sol1 "Solution 1" (study std1)
    v1: Variables "Dependent Variables 1"
    t1: Time "Time-Dependent Solver 1"
      tlist = range(0,1,2000)
      atolglobalmethod = scaled
      atolglobal = 0.001
      maxorder = 2
      fc1: FullyCoupled | linsolver = d1; maxiter = 8; damp = 0.9; jtech = once
      d1: Direct
      tpDef: TimeParametric

Datasets
  dset1: Solution | solution = sol1
  cln1: CutLine2D | data = dset1; method = twopoint; genpoints = {{1.25, 0}, {1.25, 3.50001}}
  dset2: Solution "Probe Solution 2" | solution = sol1
  cpt1: CutPoint2D "Domain Point Probe 1" | data = dset2; pointx = 1; pointy = 2
  cpt2: CutPoint2D | data = dset1; pointx = 1; pointy = 1

Derived values
  gev6: EvalGlobal "np_inflow_mass" | data = dset1; table = tbl15; expr = np_inflow_mass
  gev5: EvalGlobal "np_outflow_mass" | data = dset1; table = tbl17; expr = np_outflow_Inte
  gev7: EvalGlobal "np_retention_mass" | data = dset1; table = tbl13; expr = np_retention_mass
  gev2: EvalGlobal "np_inflow_concentraion" | data = dset1; table = tbl8; expr = np_inflow_concentraion
  gev4: EvalGlobal "np_outflow_concentraion" | data = dset1; table = tbl32; expr = np_outflow_concentraion
  gev3: EvalGlobal "np_field_concentration" | data = dset1; table = tbl14; expr = np_field_concentration
  pev1: EvalPoint "Point Probe Expression 1" (disabled) | data = cpt1; table = new; expr = c
  int1: IntLine "Line Integration 1" (disabled) on boundaries 13-16 | data = dset1; table = new; expr = c
  pev2: EvalPoint "Point Evaluation 2" (disabled) | data = dset1; table = new; expr = c_tce
  int2: IntSurface "Surface Integration 2" (disabled) | data = dset1; expr = c_tracer
  gev15: EvalGlobal "tce_mass_in_highPM987e-10" (disabled) | data = dset1; table = tbl35; expr = tce_retention_mass_highPM
  gev16: EvalGlobal "tce_mass_in_low_PM" (disabled) | data = dset1; table = tbl40; expr = tce_retention_mass_lowPM
  gev12: EvalGlobal "tce_outflow_concentraion" | data = dset1; table = tbl57; expr = tce_outflow_concentraion
  gev13: EvalGlobal "tce_field_concentration" | data = dset1; table = tbl22; expr = tce_field_concentration
  gev14: EvalGlobal "tce_outflow_mass" | data = dset1; table = tbl25; expr = tce_outflow_Inte
  gev10: EvalGlobal "tce_retention_mass" | data = dset1; table = tbl60; expr = tce_retention_mass
  gev17: EvalGlobal "tce_reacted_mass" | data = dset1; table = tbl54; expr = tce_reacted_mass

Tables
  tbl8: Table "np_inflow_concentraion"
    // Global Evaluation 2 (inflow)
    Time (s) | inflow (mol/(m*s)) | np_inflow_concentraion (mol/(m*s))
    0 | -3.80667e-08 | -4.05486e-07
    1 | -1.18267e-05 | -4.37669e-05
    2 | -1.20403e-05 | -4.44636e-05
    3 | -1.13323e-05 | -4.45488e-05
    4 | -1.10307e-05 | -4.4562e-05
    5 | -1.09928e-05 | -4.45583e-05
    6 | -1.10607e-05 | -4.45338e-05
    7 | -1.1103e-05 | -4.45334e-05
    8 | -1.11206e-05 | -4.45327e-05
    9 | -1.11265e-05 | -4.45324e-05
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  tbl15: Table "np_inflow_mass"
    // np_inflow_mass (np_inflow_mass)
    Time (s) | np_inflow_mass (mol/m)
    0 | 0
    1 | -4.37669e-05
    2 | -8.89272e-05
    3 | -0.000133646
    4 | -0.000178248
    5 | -0.000222791
    6 | -0.000267203
    7 | -0.000311734
    8 | -0.000356262
    9 | -0.000400792
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  tbl17: Table "np_outflow_mass"
    // np_outflow_mass (np_outflow_mas)
    Time (s) | np_outflow_mas (mol/m)
    0 | 0
    1 | -4.51887e-32
    2 | -1.91136e-30
    3 | -3.01399e-29
    4 | 4.49883e-28
    5 | -2.93411e-27
    6 | 5.59579e-27
    7 | 1.09626e-26
    8 | -1.19441e-25
    9 | 1.62695e-25
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  tbl13: Table "np_retention_mass"
    // np_retention_mass (np_retention_mass)
    Time (s) | np_retention_mass (mol/m)
    0 | 4.45337e-08
    1 | 4.48913e-05
    2 | 8.97386e-05
    3 | 0.00013459
    4 | 0.000179443
    5 | 0.000224296
    6 | 0.000269149
    7 | 0.000314003
    8 | 0.000358857
    9 | 0.00040371
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  tbl14: Table "np_field_concentration"
    // np_field_concentration (np_field_concentration)
    Time (s) | np_field_concentration (mol/(m*s))
    0 | 4.45344e-05
    1 | 4.48502e-05
    2 | 4.48493e-05
    3 | 4.48526e-05
    4 | 4.48526e-05
    5 | 4.48535e-05
    6 | 4.48538e-05
    7 | 4.48538e-05
    8 | 4.48536e-05
    9 | 4.48533e-05
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  tbl16: Table "tce_inflow_mass"
    // tce_inflow_mass (tce_inflow_mass)
    Time (s) | tce_inflow_mass (mol/m)
    0 | 0
    1 | -2.88238e-08
    2 | -2.0369e-08
    3 | -1.72804e-08
    4 | -1.52137e-08
    5 | -1.41109e-08
    6 | -1.48285e-08
    7 | -1.4511e-08
    8 | -1.41235e-08
    9 | -1.37391e-08
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  tbl18: Table "tce_outflow_mass"
    // tce_outflow_mass (tce_outflow_mas)
    Time (s) | tce_outflow_mas (mol/m)
    0 | 0
    1 | 4.68399e-07
    2 | 9.36802e-07
    3 | 1.40518e-06
    4 | 1.87346e-06
    5 | 2.34164e-06
    6 | 2.80973e-06
    7 | 3.27778e-06
    8 | 3.74582e-06
    9 | 4.21386e-06
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  tbl22: Table "tce_field_concentration"
    // tce_field_concentration (tce_field_concentration)
    Time (s) | tce_field_concentration (mol/(m*s))
    0 | -4.75517e-07
    1 | -4.78641e-07
    2 | -4.78784e-07
    3 | -4.78846e-07
    4 | -4.78877e-07
    5 | -4.78874e-07
    6 | -4.78844e-07
    7 | -4.78809e-07
    8 | -4.78772e-07
    9 | -4.78737e-07
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  tbl23: Table "tce_outflow_mass_Inte688e-14"
    // Global Evaluation 14 (TimeInt)
    rows = none
    lowPM_per | t (s) | State variable tce_outflow_Inte (1)
    6.88e-14 | 0 | 1.8736e-09
    6.88e-14 | 1 | 4.70273e-07
    6.88e-14 | 2 | 9.38673e-07
    6.88e-14 | 3 | 1.40707e-06
    6.88e-14 | 4 | 1.87545e-06
    6.88e-14 | 5 | 2.3438e-06
    6.88e-14 | 6 | 2.81211e-06
    6.88e-14 | 7 | 3.28038e-06
    6.88e-14 | 8 | 3.74862e-06
    6.88e-14 | 9 | 4.21684e-06
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  tbl24: Table "tce_outflow_mass_Inte688e-12"
    // tce_outflow_mass_Inte (tce_outflow_Inte)
    lowPM_per | t (s) | State variable tce_outflow_Inte (1)
    6.88e-12 | 0 | 1.8736e-09
    6.88e-12 | 1 | 4.70273e-07
    6.88e-12 | 2 | 9.38673e-07
    6.88e-12 | 3 | 1.40707e-06
    6.88e-12 | 4 | 1.87545e-06
    6.88e-12 | 5 | 2.3438e-06
    6.88e-12 | 6 | 2.81211e-06
    6.88e-12 | 7 | 3.28038e-06
    6.88e-12 | 8 | 3.74862e-06
    6.88e-12 | 9 | 4.21684e-06
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  tbl25: Table "tce_outflow_mass_Inte988e-10"
    // tce_outflow_mass_Inte (tce_outflow_Inte)
    lowPM_per | t (s) | State variable tce_outflow_Inte (1)
    9.87e-10 | 0 | 1.87365e-09
    9.87e-10 | 1 | 4.70287e-07
    9.87e-10 | 2 | 9.38701e-07
    9.87e-10 | 3 | 1.40711e-06
    9.87e-10 | 4 | 1.87551e-06
    9.87e-10 | 5 | 2.34387e-06
    9.87e-10 | 6 | 2.81219e-06
    9.87e-10 | 7 | 3.28046e-06
    9.87e-10 | 8 | 3.7487e-06
    9.87e-10 | 9 | 4.21691e-06
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  tbl26: Table "tce_outflow_concentration7"
    // tce_outflow_concentraion (tce_outflow_concentraion)
    lowPM_per | t (s) | tce_outflow_concentraion (mol/(m*s))
    1e-17 | 0 | 1.13857e-14
    1e-17 | 1 | 2.21228e-11
    1e-17 | 2 | -2.32128e-10
    1e-17 | 3 | 1.4845e-09
    1e-17 | 4 | 1.03898e-08
    1e-17 | 5 | 2.68119e-08
    1e-17 | 6 | 4.70475e-08
    1e-17 | 7 | 6.77789e-08
    1e-17 | 8 | 8.69696e-08
    1e-17 | 9 | 1.03996e-07
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  tbl27: Table "tce_outflow_concentration4"
    // tce_outflow_concentraion (tce_outflow_concentraion)
    lowPM_per | t (s) | tce_outflow_concentraion (mol/(m*s))
    1e-14 | 0 | 1.13833e-14
    1e-14 | 1 | 2.21217e-11
    1e-14 | 2 | -2.32152e-10
    1e-14 | 3 | 1.48444e-09
    1e-14 | 4 | 1.03906e-08
    1e-14 | 5 | 2.6815e-08
    1e-14 | 6 | 4.70544e-08
    1e-14 | 7 | 6.77907e-08
    1e-14 | 8 | 8.69872e-08
    1e-14 | 9 | 1.0402e-07
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  tbl28: Table "tce_outflow_concentration1"
    // tce_outflow_concentraion (tce_outflow_concentraion)
    lowPM_per | t (s) | tce_outflow_concentraion (mol/(m*s))
    1e-11 | 0 | 9.83625e-15
    1e-11 | 1 | 2.16278e-11
    1e-11 | 2 | -2.54262e-10
    1e-11 | 3 | 1.48615e-09
    1e-11 | 4 | 1.13456e-08
    1e-11 | 5 | 3.02567e-08
    1e-11 | 6 | 5.45442e-08
    1e-11 | 7 | 8.06168e-08
    1e-11 | 8 | 1.06021e-07
    1e-11 | 9 | 1.2976e-07
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  tbl49: Table "tce_outflow_concentration0"
    // tce_outflow_concentraion (tce_outflow_concentraion)
    lowPM_per | t (s) | tce_outflow_concentraion (mol/(m*s))
    1e-10 | 0 | 7.99935e-15
    1e-10 | 1 | 2.41346e-11
    1e-10 | 2 | -3.46648e-10
    1e-10 | 3 | 2.80764e-09
    1e-10 | 4 | 2.22558e-08
    1e-10 | 5 | 6.28813e-08
    1e-10 | 6 | 1.20239e-07
    1e-10 | 7 | 1.86922e-07
    1e-10 | 8 | 2.56153e-07
    1e-10 | 9 | 3.23972e-07
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  tbl50: Table "np_outflow_concentraion7"
    // np_outflow_concentraion (np_outflow_concentraion)
    lowPM_per | t (s) | np_outflow_concentraion (mol/(m*s))
    1e-17 | 0 | 4.63353e-36
    1e-17 | 1 | 2.02101e-32
    1e-17 | 2 | 1.27499e-30
    1e-17 | 3 | 9.84324e-31
    1e-17 | 4 | -9.32096e-29
    1e-17 | 5 | 4.41218e-28
    1e-17 | 6 | -1.13974e-28
    1e-17 | 7 | -3.72262e-27
    1e-17 | 8 | 1.68099e-26
    1e-17 | 9 | -3.70289e-27
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  tbl31: Table "np_outflow_concentraion4"
    // np_outflow_concentraion (np_outflow_concentraion)
    lowPM_per | t (s) | np_outflow_concentraion (mol/(m*s))
    1e-14 | 0 | 4.63435e-36
    1e-14 | 1 | 2.0214e-32
    1e-14 | 2 | 1.27446e-30
    1e-14 | 3 | 9.94115e-31
    1e-14 | 4 | -9.32473e-29
    1e-14 | 5 | 4.41591e-28
    1e-14 | 6 | -1.15724e-28
    1e-14 | 7 | -3.71453e-27
    1e-14 | 8 | 1.67974e-26
    1e-14 | 9 | -3.76803e-27
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  tbl51: Table "np_outflow_concentraion1"
    // np_outflow_concentraion (np_outflow_concentraion)
    lowPM_per | t (s) | np_outflow_concentraion (mol/(m*s))
    1e-11 | 0 | 5.22356e-36
    1e-11 | 1 | 2.06393e-32
    1e-11 | 2 | 8.05496e-31
    1e-11 | 3 | 5.63688e-30
    1e-11 | 4 | -9.09504e-29
    1e-11 | 5 | 5.33955e-28
    1e-11 | 6 | -9.53781e-28
    1e-11 | 7 | 8.71305e-28
    1e-11 | 8 | 5.37491e-27
    1e-11 | 9 | -2.32491e-26
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  tbl32: Table "np_outflow_concentraion0"
    // np_outflow_concentraion (np_outflow_concentraion)
    lowPM_per | t (s) | np_outflow_concentraion (mol/(m*s))
    1e-10 | 0 | 5.87584e-36
    1e-10 | 1 | 5.07881e-33
    1e-10 | 2 | -3.45172e-31
    1e-10 | 3 | -2.53463e-30
    1e-10 | 4 | 4.52766e-29
    1e-10 | 5 | -1.63138e-28
    1e-10 | 6 | 3.28903e-28
    1e-10 | 7 | -1.01204e-27
    1e-10 | 8 | 1.8214e-27
    1e-10 | 9 | -1.45238e-27
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  tbl33: Table "tce_mass_in_highPM688e-14"
    // tce_mass_in_highPM (tce_retention_mass_highPM)
    lowPM_per | t (s) | tce_retention_mass_highPM (mol/m)
    6.88e-14 | 0 | 6.94151e-05
    6.88e-14 | 1 | 6.89369e-05
    6.88e-14 | 2 | 6.84582e-05
    6.88e-14 | 3 | 6.79794e-05
    6.88e-14 | 4 | 6.75004e-05
    6.88e-14 | 5 | 6.70214e-05
    6.88e-14 | 6 | 6.65426e-05
    6.88e-14 | 7 | 6.6065e-05
    6.88e-14 | 8 | 6.55894e-05
    6.88e-14 | 9 | 6.51162e-05
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  tbl34: Table "tce_mass_in_highPM688e-12"
    // tce_mass_in_highPM (tce_retention_mass_highPM)
    lowPM_per | t (s) | tce_retention_mass_highPM (mol/m)
    6.88e-12 | 0 | 6.94151e-05
    6.88e-12 | 1 | 6.89369e-05
    6.88e-12 | 2 | 6.84582e-05
    6.88e-12 | 3 | 6.79794e-05
    6.88e-12 | 4 | 6.75004e-05
    6.88e-12 | 5 | 6.70214e-05
    6.88e-12 | 6 | 6.65426e-05
    6.88e-12 | 7 | 6.60651e-05
    6.88e-12 | 8 | 6.55895e-05
    6.88e-12 | 9 | 6.51164e-05
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  tbl35: Table "tce_mass_in_highPM987e-10"
    // tce_mass_in_highPM (tce_retention_mass_highPM)
    lowPM_per | t (s) | tce_retention_mass_highPM (mol/m)
    9.87e-10 | 0 | 6.94151e-05
    9.87e-10 | 1 | 6.8937e-05
    9.87e-10 | 2 | 6.84584e-05
    9.87e-10 | 3 | 6.79796e-05
    9.87e-10 | 4 | 6.75006e-05
    9.87e-10 | 5 | 6.70216e-05
    9.87e-10 | 6 | 6.65445e-05
    9.87e-10 | 7 | 6.60721e-05
    9.87e-10 | 8 | 6.56077e-05
    9.87e-10 | 9 | 6.51543e-05
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  tbl36: Table "tce_mass_in_lowPM688e-14"
    // tce_mass_in_low_PM (tce_outflow_Inte)
    lowPM_per | t (s) | tce_retention_mass_lowPM (mol/m)
    6.88e-14 | 0 | 4.73947e-05
    6.88e-14 | 1 | 4.73947e-05
    6.88e-14 | 2 | 4.73947e-05
    6.88e-14 | 3 | 4.73947e-05
    6.88e-14 | 4 | 4.73948e-05
    6.88e-14 | 5 | 4.7395e-05
    6.88e-14 | 6 | 4.73949e-05
    6.88e-14 | 7 | 4.73936e-05
    6.88e-14 | 8 | 4.73905e-05
    6.88e-14 | 9 | 4.73849e-05
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  tbl39: Table "tce_mass_in_lowPM688e-12"
    // tce_mass_in_low_PM (tce_retention_mass_lowPM)
    lowPM_per | t (s) | tce_retention_mass_lowPM (mol/m)
    6.88e-12 | 0 | 4.73947e-05
    6.88e-12 | 1 | 4.73947e-05
    6.88e-12 | 2 | 4.73947e-05
    6.88e-12 | 3 | 4.73947e-05
    6.88e-12 | 4 | 4.73948e-05
    6.88e-12 | 5 | 4.7395e-05
    6.88e-12 | 6 | 4.73949e-05
    6.88e-12 | 7 | 4.73936e-05
    6.88e-12 | 8 | 4.73904e-05
    6.88e-12 | 9 | 4.73847e-05
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  tbl40: Table "tce_mass_in_lowPM987e-10"
    // tce_mass_in_low_PM (tce_retention_mass_lowPM)
    lowPM_per | t (s) | tce_retention_mass_lowPM (mol/m)
    9.87e-10 | 0 | 4.73947e-05
    9.87e-10 | 1 | 4.73947e-05
    9.87e-10 | 2 | 4.73947e-05
    9.87e-10 | 3 | 4.73947e-05
    9.87e-10 | 4 | 4.73949e-05
    9.87e-10 | 5 | 4.73951e-05
    9.87e-10 | 6 | 4.73934e-05
    9.87e-10 | 7 | 4.7387e-05
    9.87e-10 | 8 | 4.73727e-05
    9.87e-10 | 9 | 4.73474e-05
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  tbl41: Table "TCE_reacted lg = 7"
    // tce_reacted_mass (tce_reacted_mass)
    lowPM_per | t (s) | The reacted TCE (mol/m)
    1e-17 | 0 | 1.58571e-06
    1e-17 | 1 | 1.58571e-06
    1e-17 | 2 | 1.58571e-06
    1e-17 | 3 | 1.58572e-06
    1e-17 | 4 | 1.58585e-06
    1e-17 | 5 | 1.58629e-06
    1e-17 | 6 | 1.58718e-06
    1e-17 | 7 | 1.58858e-06
    1e-17 | 8 | 1.59044e-06
    1e-17 | 9 | 1.59274e-06
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  tbl42: Table "TCE_reacted lg = 4"
    // tce_reacted_mass (tce_reacted_mass)
    lowPM_per | t (s) | The reacted TCE (mol/m)
    1e-14 | 0 | 1.58571e-06
    1e-14 | 1 | 1.58571e-06
    1e-14 | 2 | 1.58571e-06
    1e-14 | 3 | 1.58572e-06
    1e-14 | 4 | 1.58585e-06
    1e-14 | 5 | 1.58629e-06
    1e-14 | 6 | 1.58718e-06
    1e-14 | 7 | 1.58858e-06
    1e-14 | 8 | 1.59044e-06
    1e-14 | 9 | 1.59275e-06
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  tbl47: Table "TCE_reacted lg = 1"
    // tce_reacted_mass (tce_reacted_mass)
    lowPM_per | t (s) | The reacted TCE (mol/m)
    1e-11 | 0 | 1.58571e-06
    1e-11 | 1 | 1.58571e-06
    1e-11 | 2 | 1.58571e-06
    1e-11 | 3 | 1.58572e-06
    1e-11 | 4 | 1.58586e-06
    1e-11 | 5 | 1.58635e-06
    1e-11 | 6 | 1.58738e-06
    1e-11 | 7 | 1.58902e-06
    1e-11 | 8 | 1.59127e-06
    1e-11 | 9 | 1.59412e-06
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  tbl43: Table "TCE_reacted lg = 0"
    // tce_reacted_mass (tce_reacted_mass)
    lowPM_per | t (s) | The reacted TCE (mol/m)
    1e-10 | 0 | 1.58571e-06
    1e-10 | 1 | 1.58571e-06
    1e-10 | 2 | 1.58571e-06
    1e-10 | 3 | 1.58572e-06
    1e-10 | 4 | 1.58599e-06
    1e-10 | 5 | 1.58701e-06
    1e-10 | 6 | 1.58925e-06
    1e-10 | 7 | 1.593e-06
    1e-10 | 8 | 1.59842e-06
    1e-10 | 9 | 1.60549e-06
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  tbl44: Table "tce_retention_mass_7"
    // Global Evaluation 14 (TimeInt)
    rows = none
    lowPM_per | t (s) | tce_retention_mass (mol/m)
    1e-17 | 0 | 0.000234394
    1e-17 | 1 | 0.000234394
    1e-17 | 2 | 0.000234394
    1e-17 | 3 | 0.000234394
    1e-17 | 4 | 0.000234389
    1e-17 | 5 | 0.00023437
    1e-17 | 6 | 0.000234332
    1e-17 | 7 | 0.000234273
    1e-17 | 8 | 0.000234194
    1e-17 | 9 | 0.000234096
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  tbl45: Table "tce_retention_mass_4"
    // tce_outflow_mass_Inte (tce_outflow_Inte)
    lowPM_per | t (s) | tce_retention_mass (mol/m)
    1e-14 | 0 | 0.000234394
    1e-14 | 1 | 0.000234394
    1e-14 | 2 | 0.000234394
    1e-14 | 3 | 0.000234394
    1e-14 | 4 | 0.000234389
    1e-14 | 5 | 0.00023437
    1e-14 | 6 | 0.000234332
    1e-14 | 7 | 0.000234273
    1e-14 | 8 | 0.000234194
    1e-14 | 9 | 0.000234096
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  tbl48: Table "tce_retention_mass_1"
    // tce_outflow_mass_Inte (tce_outflow_Inte)
    lowPM_per | t (s) | tce_retention_mass (mol/m)
    1e-11 | 0 | 0.000234394
    1e-11 | 1 | 0.000234394
    1e-11 | 2 | 0.000234394
    1e-11 | 3 | 0.000234394
    1e-11 | 4 | 0.000234388
    1e-11 | 5 | 0.000234367
    1e-11 | 6 | 0.000234324
    1e-11 | 7 | 0.000234255
    1e-11 | 8 | 0.000234159
    1e-11 | 9 | 0.000234038
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  tbl46: Table "tce_retention_mass_0"
    // tce_outflow_mass_Inte (tce_outflow_Inte)
    lowPM_per | t (s) | tce_retention_mass (mol/m)
    1e-10 | 0 | 0.000234394
    1e-10 | 1 | 0.000234394
    1e-10 | 2 | 0.000234394
    1e-10 | 3 | 0.000234394
    1e-10 | 4 | 0.000234383
    1e-10 | 5 | 0.00023434
    1e-10 | 6 | 0.000234247
    1e-10 | 7 | 0.00023409
    1e-10 | 8 | 0.000233863
    1e-10 | 9 | 0.000233566
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  tbl54: Table "TCE_reacted 0.02"
    // tce_reacted_mass (tce_reacted_mass)
    Time (s) | The reacted TCE (mol/m)
    0 | 1.58571e-06
    1 | 1.58571e-06
    2 | 1.58571e-06
    3 | 1.58572e-06
    4 | 1.58585e-06
    5 | 1.58629e-06
    6 | 1.5872e-06
    7 | 1.58862e-06
    8 | 1.59052e-06
    9 | 1.59287e-06
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  tbl55: Table "tce_outflow_concentration0.5"
    // tce_outflow_concentraion (tce_outflow_concentraion)
    Q_inject_design | t (s) | tce_outflow_concentraion (mol/(m*s))
    0.5 | 0 | 1.56518e-13
    0.5 | 1 | 8.31887e-08
    0.5 | 2 | 4.47805e-07
    0.5 | 3 | 6.02758e-07
    0.5 | 4 | 6.83234e-07
    0.5 | 5 | 7.39139e-07
    0.5 | 6 | 7.88441e-07
    0.5 | 7 | 8.34046e-07
    0.5 | 8 | 8.87145e-07
    0.5 | 9 | 9.60308e-07
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  tbl56: Table "tce_outflow_concentration0.1"
    // tce_outflow_concentraion (tce_outflow_concentraion)
    Q_inject_design | t (s) | tce_outflow_concentraion (mol/(m*s))
    0.1 | 0 | 1.13833e-14
    0.1 | 1 | 2.21217e-11
    0.1 | 2 | -2.32152e-10
    0.1 | 3 | 1.48444e-09
    0.1 | 4 | 1.03906e-08
    0.1 | 5 | 2.6815e-08
    0.1 | 6 | 4.70544e-08
    0.1 | 7 | 6.77907e-08
    0.1 | 8 | 8.69872e-08
    0.1 | 9 | 1.0402e-07
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  tbl57: Table "tce_outflow_concentration0.02"
    // tce_outflow_concentraion (tce_outflow_concentraion)
    Time (s) | tce_outflow_concentraion (mol/(m*s))
    0 | 1.11649e-14
    1 | 2.20286e-11
    2 | -2.34453e-10
    3 | 1.4794e-09
    4 | 1.0471e-08
    5 | 2.71272e-08
    6 | 4.7745e-08
    7 | 6.8979e-08
    8 | 8.87553e-08
    9 | 1.06418e-07
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  tbl58: Table "tce_retention_mass_0.5"
    // Global Evaluation 14 (TimeInt)
    rows = none
    Q_inject_design | t (s) | tce_retention_mass (mol/m)
    0.5 | 0 | 0.000234394
    0.5 | 1 | 0.000234381
    0.5 | 2 | 0.000234093
    0.5 | 3 | 0.000233546
    0.5 | 4 | 0.000232885
    0.5 | 5 | 0.000232156
    0.5 | 6 | 0.000231374
    0.5 | 7 | 0.000230543
    0.5 | 8 | 0.000229663
    0.5 | 9 | 0.000228719
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  tbl59: Table "tce_retention_mass_0.1"
    // tce_outflow_mass_Inte (tce_outflow_Inte)
    Q_inject_design | t (s) | tce_retention_mass (mol/m)
    0.1 | 0 | 0.000234394
    0.1 | 1 | 0.000234394
    0.1 | 2 | 0.000234394
    0.1 | 3 | 0.000234394
    0.1 | 4 | 0.000234389
    0.1 | 5 | 0.00023437
    0.1 | 6 | 0.000234332
    0.1 | 7 | 0.000234273
    0.1 | 8 | 0.000234194
    0.1 | 9 | 0.000234096
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  tbl60: Table "tce_retention_mass_0.02"
    // tce_outflow_mass_Inte (tce_outflow_Inte)
    Time (s) | tce_retention_mass (mol/m)
    0 | 0.000234394
    1 | 0.000234394
    2 | 0.000234394
    3 | 0.000234394
    4 | 0.000234389
    5 | 0.00023437
    6 | 0.000234331
    7 | 0.000234272
    8 | 0.000234191
    9 | 0.000234091
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
Plots
  pg26: PlotGroup1D "TCE Reacted mass Dankoler"
    data = none
    xlabel = PV, (-)
    ylabel = m_reacted, (-)
    manualgrid = off
    xspacing = 0.1
    yspacing = 1000
    tblp1: Table
      table = tbl52
      xaxisdata = auto
      plotcolumninput = manual
      preprocx = linear
      scalingx = 1/tpv
      preprocy = linear
      scalingy = 1/m_tce_ini
      legends = {Da = 0.32, }
    tblp2: Table
      table = tbl53
      xaxisdata = auto
      plotcolumninput = manual
      preprocx = linear
      scalingx = 1/tpv
      preprocy = linear
      scalingy = 1/m_tce_ini
      legends = Da = 1.61
    tblp4: Table
      table = tbl54
      xaxisdata = auto
      plotcolumninput = manual
      preprocx = linear
      scalingx = 1/tpv
      preprocy = linear
      scalingy = 1/m_tce_ini
      legends = Da = 8.03
    tblp3: Table "lg = 0" (disabled)
      table = tbl43
      xaxisdata = 2
      plotcolumninput = manual
      plotcolumns = 3
      preprocx = linear
      scalingx = 1/tpv
      preprocy = linear
      scalingy = 1/m_tce_ini
      legends = log(k_2/k_1) = 0
  pg25: PlotGroup1D "TCE Reacted mass Permeability contrast"
    data = none
    xlabel = PV, (-)
    ylabel = m_reacted, (-)
    manualgrid = off
    xspacing = 0.1
    yspacing = 1000
    tblp1: Table "lg = 7"
      table = tbl41
      xaxisdata = 2
      plotcolumninput = manual
      plotcolumns = 3
      preprocx = linear
      scalingx = 1/tpv
      preprocy = linear
      scalingy = 1/m_tce_ini
      legends = {log(k_2/k_1) = 7, }
    tblp2: Table "lg = 4"
      table = tbl42
      xaxisdata = 2
      plotcolumninput = manual
      plotcolumns = 3
      preprocx = linear
      scalingx = 1/tpv
      preprocy = linear
      scalingy = 1/m_tce_ini
      legends = log(k_2/k_1) = 4
    tblp4: Table "lg = 1"
      table = tbl47
      xaxisdata = 2
      plotcolumninput = manual
      plotcolumns = 3
      preprocx = linear
      scalingx = 1/tpv
      preprocy = linear
      scalingy = 1/m_tce_ini
      legends = log(k_2/k_1) = 1
    tblp3: Table "lg = 0"
      table = tbl43
      xaxisdata = 2
      plotcolumninput = manual
      plotcolumns = 3
      preprocx = linear
      scalingx = 1/tpv
      preprocy = linear
      scalingy = 1/m_tce_ini
      legends = log(k_2/k_1) = 0
  pg27: PlotGroup1D "TCE Breakthrough Curve Dankoler"
    data = none
    xlabel = PV, -
    ylabel = c_outflow, -
    manualgrid = off
    xspacing = 0.1
    yspacing = 1000
    tblp1: Table
      table = tbl55
      xaxisdata = 2
      plotcolumninput = manual
      plotcolumns = 3
      preprocx = linear
      scalingx = 1/tpv
      preprocy = linear
      scalingy = 1/outlet_unit_concentration
      legends = lg = 7
    tblp2: Table
      table = tbl56
      xaxisdata = 2
      plotcolumninput = manual
      plotcolumns = 3
      preprocx = linear
      scalingx = 1/tpv
      preprocy = linear
      scalingy = 1/outlet_unit_concentration
      legends = lg = 4
    tblp4: Table
      table = tbl57
      xaxisdata = auto
      plotcolumninput = manual
      preprocx = linear
      scalingx = 1/tpv
      preprocy = linear
      scalingy = 1/outlet_unit_concentration
      legends = lg = 1
    tblp3: Table "lg = 0" (disabled)
      table = tbl49
      xaxisdata = 2
      plotcolumninput = manual
      plotcolumns = 3
      preprocx = linear
      scalingx = 1/tpv
      preprocy = linear
      scalingy = 1/outlet_unit_concentration
      legends = lg = 0
  pg20: PlotGroup1D "TCE Breakthrough Curve Permeablity Contrast"
    data = none
    xlabel = PV, -
    ylabel = c_outflow, -
    manualgrid = off
    xspacing = 0.1
    yspacing = 1000
    tblp1: Table "lg = 7"
      table = tbl26
      xaxisdata = 2
      plotcolumninput = manual
      plotcolumns = 3
      preprocx = linear
      scalingx = 1/tpv
      preprocy = linear
      scalingy = 1/outlet_unit_concentration
      legends = lg = 7
    tblp2: Table "lg = 4"
      table = tbl27
      xaxisdata = 2
      plotcolumninput = manual
      plotcolumns = 3
      preprocx = linear
      scalingx = 1/tpv
      preprocy = linear
      scalingy = 1/outlet_unit_concentration
      legends = lg = 4
    tblp4: Table "lg = 1"
      table = tbl28
      xaxisdata = 2
      plotcolumninput = manual
      plotcolumns = 3
      preprocx = linear
      scalingx = 1/tpv
      preprocy = linear
      scalingy = 1/outlet_unit_concentration
      legends = lg = 1
    tblp3: Table "lg = 0"
      table = tbl49
      xaxisdata = 2
      plotcolumninput = manual
      plotcolumns = 3
      preprocx = linear
      scalingx = 1/tpv
      preprocy = linear
      scalingy = 1/outlet_unit_concentration
      legends = lg = 0
  pg28: PlotGroup1D "TCE Remaining mass Dankoler"
    data = none
    xlabel = PV, (-)
    ylabel = m_{remain}, (-)
    manualgrid = off
    xspacing = 0.1
    yspacing = 1000
    tblp1: Table
      table = tbl58
      xaxisdata = 2
      plotcolumninput = manual
      plotcolumns = 3
      preprocx = linear
      scalingx = 1/tpv
      preprocy = linear
      scalingy = 1/m_tce_ini
      legends = lg = 7
    tblp2: Table
      table = tbl59
      xaxisdata = 2
      plotcolumninput = manual
      plotcolumns = 3
      preprocx = linear
      scalingx = 1/tpv
      preprocy = linear
      scalingy = 1/m_tce_ini
      legends = lg = 4
    tblp3: Table "lg = 0" (disabled)
      table = tbl46
      xaxisdata = 2
      plotcolumninput = manual
      plotcolumns = 3
      preprocx = linear
      scalingx = 1/tpv
      preprocy = linear
      scalingy = 1/m_tce_ini
      legends = lg = 0
  pg15: PlotGroup1D "TCE Remaining mass"
    data = none
    xlabel = PV, (-)
    ylabel = m_{remain}, (-)
    manualgrid = off
    xspacing = 0.1
    yspacing = 1000
    tblp1: Table "lg = 7"
      table = tbl44
      xaxisdata = 2
      plotcolumninput = manual
      plotcolumns = 3
      preprocx = linear
      scalingx = 1/tpv
      preprocy = linear
      scalingy = 1/m_tce_ini
      legends = lg = 7
    tblp2: Table "lg = 4"
      table = tbl45
      xaxisdata = 2
      plotcolumninput = manual
      plotcolumns = 3
      preprocx = linear
      scalingx = 1/tpv
      preprocy = linear
      scalingy = 1/m_tce_ini
      legends = lg = 4
    tblp4: Table "lg = 1"
      table = tbl48
      xaxisdata = 2
      plotcolumninput = manual
      plotcolumns = 3
      preprocx = linear
      scalingx = 1/tpv
      preprocy = linear
      scalingy = 1/m_tce_ini
      legends = lg = 1
    tblp3: Table "lg = 0"
      table = tbl46
      xaxisdata = 2
      plotcolumninput = manual
      plotcolumns = 3
      preprocx = linear
      scalingx = 1/tpv
      preprocy = linear
      scalingy = 1/m_tce_ini
      legends = lg = 0
  pg22: PlotGroup1D "TCE in highPM zone mass"
    data = none
    xlabel = PV, (-)
    ylabel = M_{outflow}, (-)
    manualgrid = off
    xspacing = 0.1
    yspacing = 1000
    tblp1: Table "688e-14"
      table = tbl33
      xaxisdata = 2
      plotcolumninput = manual
      plotcolumns = 3
      preprocx = linear
      scalingx = 1/tpv
      preprocy = linear
      scalingy = 1/(high_PV*c_tce_ini)
      legends = kr = 0.00007
    tblp2: Table "688e-12"
      table = tbl34
      xaxisdata = 2
      plotcolumninput = manual
      plotcolumns = 3
      preprocx = linear
      scalingx = 1/tpv
      preprocy = linear
      scalingy = 1/(high_PV*c_tce_ini)
      legends = k=0.007
    tblp3: Table "988e-10"
      table = tbl35
      xaxisdata = 2
      plotcolumninput = manual
      plotcolumns = 3
      preprocx = linear
      scalingx = 1/tpv
      preprocy = linear
      scalingy = 1/(high_PV*c_tce_ini)
      legends = k = 1
  pg24: PlotGroup1D "TCE in lowPM zone mass 1"
    data = none
    xlabel = PV, (-)
    ylabel = M_{outflow}, (-)
    manualgrid = off
    xspacing = 0.1
    yspacing = 1000
    tblp1: Table "688e-14"
      table = tbl36
      xaxisdata = 2
      plotcolumninput = manual
      plotcolumns = 3
      preprocx = linear
      scalingx = 1/tpv
      preprocy = linear
      scalingy = 1/(low_PV*c_tce_ini)
      legends = kr = 0.00007
    tblp2: Table "688e-12"
      table = tbl39
      xaxisdata = 2
      plotcolumninput = manual
      plotcolumns = 3
      preprocx = linear
      scalingx = 1/tpv
      preprocy = linear
      scalingy = 1/(low_PV*c_tce_ini)
      legends = k=0.007
    tblp3: Table "988e-10"
      table = tbl40
      xaxisdata = 2
      plotcolumninput = manual
      plotcolumns = 3
      preprocx = linear
      scalingx = 1/tpv
      preprocy = linear
      scalingy = 1/(low_PV*c_tce_ini)
      legends = k = 1
  pg21: PlotGroup1D "NP Breakthrough Curve"
    data = none
    xlabel = PV, (-)
    ylabel = C_{outflow}, (-)
    manualgrid = off
    xspacing = 0.1
    yspacing = 1000
    tblp1: Table "lg = 7"
      table = tbl50
      xaxisdata = 2
      plotcolumninput = manual
      plotcolumns = 3
      preprocx = linear
      scalingx = 1/tpv
      preprocy = linear
      scalingy = 1/q_inject_np
      legends = kr = 0.00007
    tblp2: Table "lg = 4"
      table = tbl27
      xaxisdata = auto
      plotcolumninput = manual
      preprocx = linear
      scalingx = 1/tpv
      preprocy = linear
      scalingy = 1/4.6888e-7
      legends = k=0.007
    tblp3: Table "lg = 1"
      table = tbl28
      xaxisdata = auto
      plotcolumninput = manual
      preprocx = linear
      scalingx = 1/tpv
      preprocy = linear
      scalingy = 1/4.6888e-7
      legends = k = 1
    tblp4: Table "lg = 0"
      table = tbl26
      xaxisdata = auto
      plotcolumninput = manual
      preprocx = linear
      scalingx = 1/tpv
      preprocy = linear
      scalingy = 1/4.6888e-7
      legends = kr = 0.00007
  pg2: PlotGroup2D "Concentration_tce" | animating = off; data = dset1; xlabel = x, cm; ylabel = y,cm
    surf1: Surface | expr = c_tce/c_tce_ini; unit = mol/m^3; title = Concentration distribution of Solute (TCE, mol/m^3).
    str1: Streamline on all boundaries | expr = {dl_w.u, dl_w.v}; startmethod = number; linetype = line
  pg7: PlotGroup2D "Concentration_np" | animating = off; data = dset1
    surf1: Surface | data = dset1; expr = c_np/c_inject_np; unit = mol/m^3
    str1: Streamline on all boundaries | expr = {dl_w.u, dl_w.v}; startmethod = number; linetype = line
  pg9: PlotGroup2D "Flux_tracer" | animating = off; data = dset1
    surf1: Surface
    str1: Streamline on all boundaries | expr = {dl_w.u, dl_w.v}; startmethod = number; linetype = line
  pg14: PlotGroup1D "NP Mass Balance" | data = dset1
    tblp1: Table "np_inflow_mass" | table = tbl15; preprocx = none; preprocy = linear; scalingy = -1
    tblp2: Table "np_outflow_mass" | table = tbl17
    tblp3: Table "np_retention_mass" | table = tbl13
  pg4: PlotGroup2D "2D Plot Group 4" (disabled) | data = dset1; xlabel = x, cm; ylabel = y, cm; axisnotation = auto
    surf1: Surface | expr = dl_w.U
    arws1: ArrowSurface | expr = {dl_w.u, dl_w.v}; xnumber = 8; ynumber = 8
    traj1: ParticleTrajectories (disabled)
    str1: Streamline (disabled) | expr = {dl_w.u, dl_w.v}
    con1: Contour (disabled) | expr = c
  pg16: PlotGroup1D "TCE Mass Balance" | data = dset1
    tblp1: Table "tce_inflow_mass" | table = tbl16; preprocx = none; preprocy = linear; scalingy = -1
    tblp2: Table "tce_outflow_mass" | table = tbl18
  pg17: PlotGroup2D "Reaction Rate" | data = dset1
    surf1: Surface | expr = tracer.R_c_tce
  pg18: PlotGroup2D "Adsoprtion" | data = dset1
    surf1: Surface | expr = R_R
  pg19: PlotGroup1D "1D Plot Group 19" | data = none
    tblp1: Table "Table Graph 1" | table = tbl23

Exports
  anim2: Animation "TCE_field"
    target = file
    type = movie
    giffilename = E:\0 Comsol - t\Comparison\TCE_field002.gif
    gifopen = on
    sweeptype = solutions
    maxframes = 100
    options = on
  anim3: Animation "NP_field" | giffilename = E:\0 Comsol - t\Comparison\NP_field.gif; options = on; axes = on
  img1: Image1D "1D Image 1"
    size = current
    weblockratio = off
    webwidth = 800
    webheight = 600
    webresolution = 800
    printlockratio = off
    printwidth = 120
    printheight = 90
    printresolution = 600
    options = on
    axes = on